// COMSOL Multiphysics 6.0.0.354 model "CoreShell-TD-AlN-3.mph"
// This is a simulation of a Magnetoelectric Coreshell. The electrical field on the external piezo shell is analyzed.
// Outline of the model tree

Parameters
  r_wire = 0.5[mm]  // Radius, wire
  R1 = 100[mm]  // Radius, outer coil
  R2 = 10[mm]  // Radius, inner coil
  I0 = 0.1 [A]  // Applied current on the wire
  f1 = 188 [MHz]
  f2 = 126 [MHz]
  tint = (1/f2)/20
  ttot = (1/f2)*25
  B = 0 [T]
  thickness = 37.5 [um]
  r_s = 440 [kohm]

Selections
  sel1: Explicit "Air" on domains 1, 2, 5
  sel2: Explicit "Coils" on domains 6, 7
  sel3: Explicit "Magnetostrictive" on domains 4
  sel4: Explicit "Mag vector potential" on boundaries 1-8, 11, 16 | groupcontang = on
  sel5: Explicit "Piezo" on domains 3
  sel6: Explicit "Solid" on domains 3, 4

Probes
  dom1: Domain "Domain Probe 1" on selection sel5
    expr = es.normE
    unit = V/m
    descr = Electric field norm
    frame = spatial
    axisym = 2d
    intsurface = on
    intvolume = on
    table = tbl7

Coordinate systems
  ie1: InfiniteElement "Infinite Element Domain 1" on domains 1, 5

Geometry
  geom1 "Geometry 1" (2D axisymmetric, length unit mm)
    c1: Circle | rot = -90; layername = Layer 1; layer = 3[mm]; r = R1/10; angle = 180
    c2: Circle | pos = {0.4, -0.4}; r = r_wire/5
    c3: Circle (disabled) | pos = {0, R2+30}; r = r_wire
    c4: Circle | rot = -90; layername = Layer 1; layer = thickness; r = (r_wire/10)+thickness; angle = 180
    mir1: Mirror | input = c2; keep = on; axis = {0, 1}
    del1: Delete "Delete Entities 1" | input = c4(1) boundaries 1, 4, 5
    fin: Finalize "Form Union"

Materials
  mat1: Common "Copper" on selection sel2
    def "Basic"
      relpermeability = 1
      electricconductivity = 5.998e7[S/m]
      thermalexpansioncoefficient = 17e-6[1/K]
      heatcapacity = 385[J/(kg*K)]
      relpermittivity = 1
      density = 8960[kg/m^3]
      thermalconductivity = 400[W/(m*K)]
    Enu "Young's modulus and Poisson's ratio"
      E = 110e9[Pa]
      nu = 0.35
    linzRes "Linearized resistivity"
      rho0 = 1.72e-8[ohm*m]
      alpha = 0.0039[1/K]
      Tref = 298[K]
  mat2: Common "Air" on selection sel1
    def "Basic"
      thermalexpansioncoefficient = alpha_p(pA,T)
      molarmass = 0.02897[kg/mol]
      bulkviscosity = muB(T)
      relpermeability = 1
      relpermittivity = 1
      dynamicviscosity = eta(T)
      ratioofspecificheat = 1.4
      electricconductivity = 0[S/m]
      heatcapacity = Cp(T)
      density = rho(pA,T)
      thermalconductivity = k(T)
      soundspeed = cs(T)
      eta: Piecewise | arg = T; pieces = {200.0, 1600.0, -8.38278E-7+8.35717342E-8*T^1-7.69429583E-11*T^2+4.6437266E-14*T^3-1.06585607E-17*T^4}; argunit = K; fununit = Pa*s
      Cp: Piecewise | arg = T; pieces = {200.0, 1600.0, 1047.63657-0.372589265*T^1+9.45304214E-4*T^2-6.02409443E-7*T^3+1.2858961E-10*T^4}; argunit = K; fununit = J/(kg*K)
      rho: Analytic | expr = pA*0.02897/R_const[K*mol/J]/T; args = {pA, T}; fununit = kg/m^3; argunit = {Pa, K}
      k: Piecewise | arg = T; pieces = {200.0, 1600.0, -0.00227583562+1.15480022E-4*T^1-7.90252856E-8*T^2+4.11702505E-11*T^3-7.43864331E-15*T^4}; argunit = K; fununit = W/(m*K)
      cs: Analytic | expr = sqrt(1.4*R_const[K*mol/J]/0.02897*T); args = T; fununit = m/s; argunit = K
      an1: Analytic | funcname = alpha_p; expr = -1/rho(pA,T)*d(rho(pA,T),T); args = {pA, T}; fununit = 1/K; argunit = {Pa, K}
      an2: Analytic "Analytic 2a" | funcname = muB; expr = 0.6*eta(T); args = T; fununit = Pa*s; argunit = K
    RefractiveIndex
      n = 1
      ki = 0
    NonlinearModel
      BA = (def.gamma+1)/2
    idealGas
      Rs = R_const/Mn
      heatcapacity = Cp(T)
      ratioofspecificheat = 1.4
      molarmass = 0.02897
      Cp: Piecewise | arg = T; pieces = {200.0, 1600.0, 1047.63657-0.372589265*T^1+9.45304214E-4*T^2-6.02409443E-7*T^3+1.2858961E-10*T^4}; argunit = K; fununit = J/(kg*K)
  mat3: Common "Metglas Nano Nanocrystalline" on selection sel3
    def "Basic"
      electricconductivity = 0.833333[MS/m]
      relpermittivity = 1[1]
      youngsmodulus = 152e9
      poissonsratio = 0.22
      density = 7900
      lossfactor = 1E-4
    BHCurve
      normB = BH(normHin)
      normH = BH_inv(normBin)
      Wpm = BH_prim(normHin)
      normHin = sqrt(H1^2+H2^2+H3^2+eps)
      DESCR_PREFIX:normHin = Magnetic field norm
      normBin = sqrt(B1^2+B2^2+B3^2+eps)
      DESCR_PREFIX:normBin = Magnetic flux density norm
      BH: Interpolation
        table = 
          {0, 0}
          {53.0513333333333, 0.0832465277778}
          {106.102666666667, 0.165972222222}
          {159.154, 0.24765625}
          {212.205333333333, 0.327777777778}
          {265.256666666667, 0.405815972222}
          {318.308, 0.48125}
          {371.359333333333, 0.553559027778}
          {424.410666666667, 0.622222222222}
          {477.462, 0.68671875}
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        extrap = linear
        fununit = T
        argunit = A/m
        defineinv = on
        defineprimfun = on
    Magnetostrictive
      Ms = 700282
      chi0 = 12
      lambdas = 12[ppm]
  mat5: Common "Aluminum Nitride" on selection sel5
    def "Basic"
      relpermittivity = 9
      density = 3300[kg/m^3]
      relpermeability = 1
      electricconductivity = 1e-6
    StrainCharge "Strain-charge form"
      sE = {2.8987e-12[1/Pa], -9.326e-013[1/Pa], -5.0038e-013[1/Pa], 0[1/Pa], 0[1/Pa], 0[1/Pa], -9.326e-013[1/Pa], 2.8987e-12[1/Pa], -5.0038e-013[1/Pa], 0[1/Pa], 0[1/Pa], 0[1/Pa], -5.0038e-013[1/Pa], -5.0038e-013[1/Pa], 2.8253e-012[1/Pa], 0[1/Pa], 0[1/Pa], 0[1/Pa], 0[1/Pa], 0[1/Pa], 0[1/Pa], 8E-12[1/Pa], 0[1/Pa], 0[1/Pa], 0[1/Pa], 0[1/Pa], 0[1/Pa], 0[1/Pa], 8E-12[1/Pa], 0[1/Pa], 0[1/Pa], 0[1/Pa], 0[1/Pa], 0[1/Pa], 0[1/Pa], 7.6628E-12[1/Pa]}
      dET = {0[C/N], 0[C/N], -1.9159e-012[C/N], 0[C/N], 0[C/N], -1.9159e-012[C/N], 0[C/N], 0[C/N], 4.9597e-012[C/N], 0[C/N], -3.84e-012[C/N], 0[C/N], -3.84e-012[C/N], 0[C/N], 0[C/N], 0[C/N], 0[C/N], 0[C/N]}
      epsilonrT = diag{9.2081, 9.2081, 10.1192}
      eta_sE = {0, 0, 0, 0, 0, 0, 0, 0, 0, 0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}
      eta_dET = {0, 0, 0, 0, 0, 0, 0, 0, 0, 0, 0, 0, 0, 0, 0, 0, 0, 0}
      eta_epsilonT = 0
    StressCharge "Stress-charge form"
      cE = {4.1e+011[Pa], 1.49e+011[Pa], 0.99e+011[Pa], 0[Pa], 0[Pa], 0[Pa], 1.49e+011[Pa], 4.1e+011[Pa], 0.99e+011[Pa], 0[Pa], 0[Pa], 0[Pa], 0.99e+011[Pa], 0.99e+011[Pa], 3.89e+011[Pa], 0[Pa], 0[Pa], 0[Pa], 0[Pa], 0[Pa], 0[Pa], 1.25e+011[Pa], 0[Pa], 0[Pa], 0[Pa], 0[Pa], 0[Pa], 0[Pa], 1.25e+011[Pa], 0[Pa], 0[Pa], 0[Pa], 0[Pa], 0[Pa], 0[Pa], 1.305e+011[Pa]}
      eES = {0[C/m^2], 0[C/m^2], -0.58[C/m^2], 0[C/m^2], 0[C/m^2], -0.58[C/m^2], 0[C/m^2], 0[C/m^2], 1.55[C/m^2], 0[C/m^2], -0.48[C/m^2], 0[C/m^2], -0.48[C/m^2], 0[C/m^2], 0[C/m^2], 0[C/m^2], 0[C/m^2], 0[C/m^2]}
      epsilonrS = 9
      eta_cE = {0, 0, 0, 0, 0, 0, 0, 0, 0, 0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}
      eta_eES = {0, 0, 0, 0, 0, 0, 0, 0, 0, 0, 0, 0, 0, 0, 0, 0, 0, 0}
      eta_epsilonS = 0
  mat4: Common "Lead Zirconate Titanate (PZT-5H)" (disabled) on selection sel5
    def "Basic"
      heatcapacity = 440[J/(kg*K)]
      thermalconductivity = 1.3[W/(m*K)]
      relpermittivity = diag{1704.4, 1704.4, 1433.6}
      density = 7500[kg/m^3]
      electricconductivity = 1e-6
      relpermeability = 1
    StrainCharge "Strain-charge form"
      sE = {1.65e-011[1/Pa], -4.78e-012[1/Pa], -8.45e-012[1/Pa], 0[1/Pa], 0[1/Pa], 0[1/Pa], -4.78e-012[1/Pa], 1.65e-011[1/Pa], -8.45e-012[1/Pa], 0[1/Pa], 0[1/Pa], 0[1/Pa], -8.45e-012[1/Pa], -8.45e-012[1/Pa], 2.07e-011[1/Pa], 0[1/Pa], 0[1/Pa], 0[1/Pa], 0[1/Pa], 0[1/Pa], 0[1/Pa], 4.35e-011[1/Pa], 0[1/Pa], 0[1/Pa], 0[1/Pa], 0[1/Pa], 0[1/Pa], 0[1/Pa], 4.35e-011[1/Pa], 0[1/Pa], 0[1/Pa], 0[1/Pa], 0[1/Pa], 0[1/Pa], 0[1/Pa], 4.26e-011[1/Pa]}
      dET = {0[C/N], 0[C/N], -2.74e-010[C/N], 0[C/N], 0[C/N], -2.74e-010[C/N], 0[C/N], 0[C/N], 5.93e-010[C/N], 0[C/N], 7.41e-010[C/N], 0[C/N], 7.41e-010[C/N], 0[C/N], 0[C/N], 0[C/N], 0[C/N], 0[C/N]}
      epsilonrT = diag{3130, 3130, 3400}
      eta_sE = {0, 0, 0, 0, 0, 0, 0, 0, 0, 0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}
      eta_dET = {0, 0, 0, 0, 0, 0, 0, 0, 0, 0, 0, 0, 0, 0, 0, 0, 0, 0}
      eta_epsilonT = 0
    StressCharge "Stress-charge form"
      cE = {1.27205e+011[Pa], 8.02122e+010[Pa], 8.46702e+010[Pa], 0[Pa], 0[Pa], 0[Pa], 8.02122e+010[Pa], 1.27205e+011[Pa], 8.46702e+010[Pa], 0[Pa], 0[Pa], 0[Pa], 8.46702e+010[Pa], 8.46702e+010[Pa], 1.17436e+011[Pa], 0[Pa], 0[Pa], 0[Pa], 0[Pa], 0[Pa], 0[Pa], 2.29885e+010[Pa], 0[Pa], 0[Pa], 0[Pa], 0[Pa], 0[Pa], 0[Pa], 2.29885e+010[Pa], 0[Pa], 0[Pa], 0[Pa], 0[Pa], 0[Pa], 0[Pa], 2.34742e+010[Pa]}
      eES = {0[C/m^2], 0[C/m^2], -6.62281[C/m^2], 0[C/m^2], 0[C/m^2], -6.62281[C/m^2], 0[C/m^2], 0[C/m^2], 23.2403[C/m^2], 0[C/m^2], 17.0345[C/m^2], 0[C/m^2], 17.0345[C/m^2], 0[C/m^2], 0[C/m^2], 0[C/m^2], 0[C/m^2], 0[C/m^2]}
      epsilonrS = diag{1704.4, 1704.4, 1433.6}
      eta_cE = {0, 0, 0, 0, 0, 0, 0, 0, 0, 0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}
      eta_eES = {0, 0, 0, 0, 0, 0, 0, 0, 0, 0, 0, 0, 0, 0, 0, 0, 0, 0}
      eta_epsilonS = 0
    Enu "Young's modulus and Poisson's ratio"
      E = 100E9
      nu = 0.2

Physics
  solid: SolidMechanics on selection sel6
    dependent variable u = {u, v, w}
    lemm1: LinearElasticModel "Linear Elastic Material 1" (default)
    axi1: AxialSymmetrySolid "Axial Symmetry 1" (default)
    free1: Free (default)
    init1: init "Initial Values 1" (default)
    mgm1: MagnetostrictiveModel "Magnetostrictive Material 1" on selection sel3
      MagnetostrictionModel = NonlinearIsotropic
      dmp1: Damping "Mechanical Damping 1" on all domains | eta_s_mat = userdef; eta_s = 1E-4
    pzm1: PiezoelectricMaterialModel "Piezoelectric Material 1" on selection sel5
      CalculateDissipatedEnergy = 1
      coordinateSystem = GlobalSystem
      mdmp1: MechanicalDamping on all domains
        DampingType = IsotropicLossFactor
        eta_cE_mat = userdef
        eta_cE = {0, 0, 0, 0, 0, 0, 0, 0, 0, 0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}
        eta_s_mat = userdef
        eta_s = 1E-4
    fix1: Fixed "Fixed Constraint 1" on boundaries 12, 15
  mf: InductionCurrents "Magnetic Fields" on all domains
    dependent variable A = {Ar, Aphi, Az}
    ShapeProperty.order_magneticvectorpotential = 1
    components.components = outofplane
    BackgroundField.SolveFor = ReducedField
    BackgroundField.BackgroundFieldType = Bb
    BackgroundField.Bbz = B
    al1: AmperesLaw "Ampère's Law 1" (default)
    axi1: AxialSymmetry (default)
    mi1: MagneticInsulation (default)
    init1: init "Initial Values 1" (default)
    alm1: AmperesLawMagnetostrictive "Ampère's Law, Magnetostrictive 1" on selection sel3
    coil1: Coil on domains 7 | ConductorModel = Multi; ICoil = I0*sin(2*pi*f1*t); N = 100; materialType = from_mat
    coil2: Coil on domains 6 | ConductorModel = Multi; ICoil = I0*sin(2*pi*f2*t); N = 100; materialType = from_mat
    fcal1: ForceCalculation on domains 4 | ForceName = m
  es: Electrostatics on selection sel5
    dependent variable V
    ccn1: ChargeConservation (default)
    axi1: AxialSymmetry (default)
    zc1: ZeroCharge (default)
    init1: init "Initial Values 1" (default)
    ccnp1: ChargeConservationPiezo "Charge Conservation, Piezoelectric 1" on selection sel5
      coordinateSystem = GlobalSystem
    fcal1: ForceCalculation on domains 3 | ForceName = p
    gnd1: Ground on boundaries 12, 15

Multiphysics
  pzm1: Magnetostriction on all domains | Solid_physics = solid; MagneticFields_physics = mf
  pze1: PiezoelectricEffect on all domains | Solid_physics = solid; Electrostatics_physics = es

Mesh
  mesh2 "Mesh 2"
    size: MeshSizeDefault | hmax = 1.06; hmin = 0.006; hcurve = 0.3; hgrad = 1.3; hauto = 4
    dis1: Distribution on boundaries 1, 8, 9 | type = predefined
    ftri1: FreeTri "Free Triangular 1" on domains 2
      size1: Size on domains 2 | hauto = 2
    map1: Map "Mapped 1" on domains 1, 5 | smoothmaxiter = 4; smoothmaxdepth = 4; adjustedgdistr = on
      size1: Size on domains 1, 5
    ftri2: FreeTri "Free Triangular 2" on domains 3, 4, 6, 7
      size1: Size on domains 3, 4, 6, 7 | hauto = 1
    bl1: BndLayer "Boundary Layers 1" on domains 3, 4, 6, 7
      blp: BndLayerProp "Boundary Layer Properties" on boundaries 12-15, 18-25
        blnlayers = 10
        blstretch = 0.6
        blhminfact = 0.5

Studies
  std1 "Study 1"
    param: Parametric "Parametric Sweep"
      pname = B
      plistarr = 10 50 100 150 200 225 250 275 290 291 292 293 294 295 296 297 298 299 300 350 400 450 500
      punit = mT
    time: Transient "Time Dependent" | tlist = range(0,0.01*tint,4*ttot); geometricNonlinearity = on

Datasets
  dset2: Solution | solution = none

Tables
  tbl2: Table
    // Surface Maximum 225
    B (mT) | Time (s) | Maximum normalised electric field (mV/um) | Average normalised electric field (mV/um)
    225 | 0 | 0.513049 | 3.58175
    225 | 5.37897e-10 | 30.2301 | 3.58688
    225 | 9.85121e-10 | 26.4055 | 3.5919
    225 | 1.43235e-09 | 35.5409 | 3.6021
    225 | 1.87957e-09 | 22.6931 | 3.61326
    225 | 2.3268e-09 | 22.7932 | 3.64063
    225 | 2.77402e-09 | 31.279 | 3.66606
    225 | 3.22124e-09 | 25.533 | 3.72468
    225 | 3.66847e-09 | 23.4416 | 3.78279
    225 | 4.11569e-09 | 24.5832 | 3.8419
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  tbl3: Table
    // Surface Maximum 250
    B (mT) | Time (s) | Maximum normalised electric field (mV/um) | Average normalised electric field (mV/um)
    250 | 0 | 0.601417 | 5.68506
    250 | 5.25101e-10 | 34.344 | 5.43884
    250 | 9.56804e-10 | 31.5517 | 5.20172
    250 | 1.38851e-09 | 39.9663 | 4.9539
    250 | 1.82021e-09 | 25.4874 | 4.70822
    250 | 2.25191e-09 | 34.3785 | 4.48659
    250 | 2.68361e-09 | 35.5875 | 4.26047
    250 | 3.11531e-09 | 28.0802 | 3.86074
    250 | 3.54702e-09 | 27.0058 | 3.5616
    250 | 3.97872e-09 | 30.4772 | 3.45283
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  tbl4: Table
    // Surface Maximum 275
    B (mT) | Time (s) | Maximum normalised electric field (mV/um) | Average normalised electric field (mV/um)
    275 | 0 | 0.726467 | 4.44515
    275 | 5.15202e-10 | 39.1286 | 4.43189
    275 | 9.35122e-10 | 34.472 | 4.419
    275 | 1.35504e-09 | 44.8682 | 4.40556
    275 | 1.77496e-09 | 28.7882 | 4.3919
    275 | 2.19488e-09 | 30.0007 | 4.37834
    275 | 2.6148e-09 | 39.1064 | 4.36519
    275 | 3.03472e-09 | 30.6337 | 4.35275
    275 | 3.45464e-09 | 33.3726 | 4.3413
    275 | 3.87456e-09 | 31.6498 | 4.33108
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  tbl5: Table
    // Surface Maximum 300
    B (mT) | Time (s) | Maximum normalised electric field (mV/um) | Average normalised electric field (mV/um)
    300 | 0 | 0.842436 | 9.24073
    300 | 4.60184e-10 | 43.6251 | 9.84463
    300 | 8.15237e-10 | 35.4515 | 10.3905
    300 | 1.13478e-09 | 43.994 | 10.737
    300 | 1.45433e-09 | 42.1523 | 10.8157
    300 | 1.77388e-09 | 38.7954 | 10.4737
    300 | 2.09343e-09 | 50.7934 | 8.50412
    300 | 2.41297e-09 | 49.4564 | 7.96178
    300 | 2.73252e-09 | 39.1283 | 7.30337
    300 | 3.37162e-09 | 61.5195 | 6.78025
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  tbl6: Table
    // Surface Maximum 6
    B (mT) | Time (s) | Maximum normalised electric field (mV/um) | Average normalised electric field (mV/um)
    293 | 0 | 0.809712 | 4.84712
    293 | 5.07663e-10 | 42.0867 | 4.83214
    293 | 9.18622e-10 | 37.1846 | 4.81688
    293 | 1.32958e-09 | 47.6827 | 4.78609
    293 | 1.74054e-09 | 31.957 | 4.75589
    293 | 2.1515e-09 | 32.1659 | 4.70141
    293 | 2.56246e-09 | 43.6361 | 4.64407
    293 | 2.97342e-09 | 32.4134 | 4.56865
    293 | 3.38438e-09 | 32.8686 | 4.48808
    293 | 3.79534e-09 | 38.1479 | 4.41322
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  tbl7: Table "Probe Table 7"
    Time (s) | Electric field norm (V/m), Domain Probe 1
    0 | 1.09769
    4.42834e-10 | 1077.42
    7.79056e-10 | 2044.01
    1.11528e-09 | 2882.77
    1.4515e-09 | 3699.38
    1.78772e-09 | 4461.13
    2.12394e-09 | 5090.07
    2.46016e-09 | 5667.08
    2.79638e-09 | 6199.88
    3.1326e-09 | 6565.79
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  tbl8: Table
    // Surface Average 8
    B (mT) | Time (s) | Maximum normalised electric field (mV/um) | Average normalised electric field (mV/um)
    350 | 0 | 1.14523 | 7.73946
    350 | 4.85411e-10 | 50.4955 | 7.85762
    350 | 8.70218e-10 | 44.648 | 7.98996
    350 | 1.25503e-09 | 55.2993 | 8.11531
    350 | 1.63983e-09 | 41.6514 | 8.22685
    350 | 2.02464e-09 | 39.1315 | 8.34004
    350 | 2.40945e-09 | 49.1566 | 8.41804
    350 | 2.79426e-09 | 36.884 | 8.48066
    350 | 3.17907e-09 | 42.9582 | 8.54124
    350 | 3.56387e-09 | 46.0437 | 8.55619
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  tbl11: Table
    // Line Average 10
    B (mT) | Time (s) | abs(V) (V)
    293 | 0 | 0
    293 | 5.07663e-10 | 0
    293 | 9.18622e-10 | 0
    293 | 1.32958e-09 | 0
    293 | 1.74054e-09 | 0
    293 | 2.1515e-09 | 0
    293 | 2.56246e-09 | 0
    293 | 2.97342e-09 | 0
    293 | 3.38438e-09 | 0
    293 | 3.79534e-09 | 0
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  tbl13: Table
    // Surface Average 6
    B (mT) | Time (s) | -dtang(dtang(V,z),z) (uV/cm^2)
    293 | 0 | -1.95399e+07
    293 | 5.07663e-10 | -7.53314e+08
    293 | 9.18622e-10 | 8.15539e+08
    293 | 1.32958e-09 | 1.72655e+09
    293 | 1.74054e-09 | -1.07831e+09
    293 | 2.1515e-09 | -5.34554e+08
    293 | 2.56246e-09 | 1.28049e+09
    293 | 2.97342e-09 | 2.18344e+09
    293 | 3.38438e-09 | 1.98167e+07
    293 | 3.79534e-09 | -3.45054e+09
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  tbl16: Table
    // Line Average 11
    B (mT) | Time (s) | sqrt(((-dtang(dtang(V,z),z))^2)+((-dtang(dtang(V,r),r))^2)) (uV/cm^2)
    293 | 0 | 9.65693e+06
    293 | 5.07663e-10 | 4.0688e+09
    293 | 9.18622e-10 | 4.62371e+09
    293 | 1.32958e-09 | 4.53362e+09
    293 | 1.74054e-09 | 5.70245e+09
    293 | 2.1515e-09 | 4.8802e+09
    293 | 2.56246e-09 | 4.0582e+09
    293 | 2.97342e-09 | 6.62107e+09
    293 | 3.38438e-09 | 1.02356e+10
    293 | 3.79534e-09 | 3.99932e+09
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  tbl17: Table
    // Line Minimum 8
    B (mT) | Time (s) | sqrt(((-dtang(dtang(V,z),z))^2)+((-dtang(dtang(V,r),r))^2)) (uV/cm^2)
    293 | 0 | 1.10806e+07
    293 | 5.07663e-10 | 5.41616e+09
    293 | 9.18622e-10 | 3.07893e+08
    293 | 1.32958e-09 | 2.06538e+08
    293 | 1.74054e-09 | 1.64696e+09
    293 | 2.1515e-09 | 4.23584e+08
    293 | 2.56246e-09 | 1.05897e+09
    293 | 2.97342e-09 | 6.55598e+07
    293 | 3.38438e-09 | 1.08644e+10
    293 | 3.79534e-09 | 8.63934e+08
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  tbl18: Table
    // Line Average 12
    B (mT) | Time (s) | es.JZ+es.JR+es.JPHI (uA/cm^2)
    293 | 0 | -1068.91
    293 | 5.07663e-10 | -3965.85
    293 | 9.18622e-10 | -4413.55
    293 | 1.32958e-09 | -4363.35
    293 | 1.74054e-09 | -4825.25
    293 | 2.1515e-09 | -4511.97
    293 | 2.56246e-09 | -1356.01
    293 | 2.97342e-09 | 241.276
    293 | 3.38438e-09 | -14657.7
    293 | 3.79534e-09 | -18259.6
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